<?xml version="1.0"?>
<!-- Generated by Aero-Matic v 1.1

     Inputs:
                horsepower: 764.37
                     pitch: variable
            max engine rpm: 2200
        prop diameter (ft): 7.74316

     Outputs:
              max prop rpm: 2200
                gear ratio:    1.0
                       Cp0: 0.096420
                       Ct0: 0.224657
       static thrust (lbs): 3132.36

Hartzell HC_B3TN_3(D)/T10282N.
Propeller Limits: Propeller Speed (NP) _ Maximum Continuous 2200 RPM. Maximum Takeoff 2200 RPM. Maximum Reverse 2100 RPM ..

-->

<propeller name="prop">
  <ixx>   8.99 </ixx>
  <diameter unit="M">  2.362 </diameter>
  <numblades> 4 </numblades>
  <gearratio>  1.8515 </gearratio>
  <p_factor>   7.34 </p_factor>
  <minpitch> 11 </minpitch>
  <maxpitch> 86 </maxpitch>
  <minrpm>   2060 </minrpm>
  <maxrpm>   2200 </maxrpm>
  <!--
 <constspeed> 1 </constspeed>
 -->
 <!-- thrust coefficient as a function of advance ratio and blade angle -->
  <table name="C_THRUST" type="internal">
      <tableData>
                -10        0         15        25        35        45        55        65       90
      -0.2      -0.1096    0.0618    0.2247    0.2752    0.3033    0.3201    0.2950    0.2527   0.0000
       0.0      -0.1629    0.0000    0.2247    0.2752    0.3033    0.3231    0.3019    0.2527   0.0000
       0.2      -0.1826   -0.0562    0.1939    0.2696    0.2990    0.3231    0.3019    0.2527   0.0000
       0.4      -0.1826   -0.1305    0.1460    0.2669    0.2934    0.3201    0.3019    0.2527   0.0000
       0.6      -0.1826   -0.1826    0.0773    0.2402    0.2808    0.3118    0.2977    0.2527   0.0000
       0.8      -0.1826   -0.1826    0.0043    0.1797    0.2725    0.3006    0.2977    0.2527   0.0000
       1.0      -0.1826   -0.1826   -0.0730    0.1096    0.2613    0.2851    0.2950    0.2527   0.0000
       1.2      -0.1826   -0.1826   -0.1503    0.0337    0.2148    0.2752    0.2950    0.2527   0.0000
       1.4      -0.1826   -0.1826   -0.1826   -0.0492    0.1546    0.2709    0.2894    0.2527   0.0000
       1.6      -0.1826   -0.1826   -0.1826   -0.1249    0.0842    0.2613    0.2837    0.2527   0.0000
       1.8      -0.1826   -0.1826   -0.1826   -0.1826    0.0142    0.2247    0.2752    0.2527   0.0000
       2.0      -0.1826   -0.1826   -0.1826   -0.1826   -0.0562    0.1755    0.2741    0.2527   0.0000
       2.2      -0.1826   -0.1826   -0.1826   -0.1826   -0.1265    0.1265    0.2696    0.2527   0.0000
       2.4      -0.1826   -0.1826   -0.1826   -0.1826   -0.1826    0.0674    0.2202    0.2527   0.0000
       2.6      -0.1826   -0.1826   -0.1826   -0.1826   -0.1826    0.0085    0.1393    0.2247   0.0000
       2.8      -0.1826   -0.1826   -0.1826   -0.1826   -0.1826   -0.0505    0.0912    0.1826   0.0000
       3.0      -0.1826   -0.1826   -0.1826   -0.1826   -0.1826   -0.1096    0.0479    0.1404   0.0000
       3.2      -0.1826   -0.1826   -0.1826   -0.1826   -0.1826   -0.1685    0.0043    0.0984   0.0000
       3.4      -0.1826   -0.1826   -0.1826   -0.1826   -0.1826   -0.1826   -0.0393    0.0562   0.0000
       3.6      -0.1826   -0.1826   -0.1826   -0.1826   -0.1826   -0.1826   -0.0829    0.0142   0.0000
       3.8      -0.1826   -0.1826   -0.1826   -0.1826   -0.1826   -0.1826   -0.1265   -0.0281   0.0000
       4.0      -0.1826   -0.1826   -0.1826   -0.1826   -0.1826   -0.1826   -0.1698   -0.0703   0.0000
       6.0      -0.1826   -0.1826   -0.1826   -0.1826   -0.1826   -0.1826   -0.1826   -0.1826   0.0000
      </tableData>
  </table>

 <!-- power coefficient as a function of advance ratio and blade angle -->
  <table name="C_POWER" type="internal">
     <tableData>
               -10        0        15        25        35        45        55        65       90
      -0.2      0.0161   0.0321    0.1125    0.2555    0.4406    0.6267    0.7231    0.8003   0.8003
       0.0      0.0643   0.0161    0.0964    0.2382    0.4214    0.6267    0.7260    0.8003   0.8003
       0.2      0.0916   0.0257    0.0932    0.2218    0.4030    0.6267    0.7260    0.8003   0.8003
       0.4      0.1234   0.0562    0.0803    0.2044    0.3828    0.6267    0.7260    0.8003   0.8003
       0.6      0.1514   0.0851    0.0530    0.1899    0.3587    0.6142    0.7231    0.8003   0.8003
       0.8      0.1784   0.1141    0.0161    0.1610    0.3375    0.5862    0.7231    0.8003   0.8003
       1.0      0.2054   0.1417    0.0161    0.1128    0.3182    0.5563    0.7203    0.8003   0.8003
       1.2      0.2333   0.1133   -0.0530    0.0434    0.2815    0.5332    0.7154    0.8003   0.8003
       1.4      0.2603   0.1957   -0.0800   -0.0321    0.2169    0.5255    0.7068    0.8003   0.8003
       1.6      0.2873   0.2237   -0.0935   -0.0964    0.1369    0.5110    0.6913    0.7714   0.8003
       1.8      0.3153   0.2507   -0.0964   -0.1610    0.0402    0.4532    0.6701    0.7550   0.8003
       2.0      0.3423   0.2777   -0.1234   -0.2247   -0.0482    0.3857    0.6383    0.7395   0.8003
       2.2      0.3693   0.3056   -0.1514   -0.2893   -0.1446    0.3134    0.6190    0.7068   0.8003
       2.4      0.3972   0.3326   -0.1784   -0.3539   -0.2410    0.2237    0.6007    0.6913   0.8003
       2.6      0.4242   0.3596   -0.2054   -0.4175   -0.3056    0.0935    0.5862    0.6672   0.8003
       2.8      0.4512   0.3876   -0.2333   -0.4821   -0.3664   -0.0318    0.5737    0.6585   0.8003
       3.0      0.4792   0.4146   -0.2603   -0.5467   -0.4339   -0.1446    0.5544    0.6585   0.8003
       3.2      0.5062   0.4416   -0.2873   -0.6103   -0.4985   -0.2574    0.5187    0.6431   0.8003
       3.4      0.5332   0.4696   -0.3153   -0.6749   -0.5621   -0.3693    0.4021    0.6267   0.8003
       3.6      0.5612   0.4966   -0.3423   -0.7395   -0.6267   -0.4821    0.2825    0.6103   0.8003
       3.8      0.5882   0.5236   -0.3693   -0.8003   -0.6913   -0.5949    0.1572    0.5911   0.8003
       4.0      0.6152   0.5515   -0.3972   -0.8003   -0.8003   -0.7068    0.0318    0.5467   0.8003
       6.0      0.8003   0.8003   -0.8003   -0.8003   -0.8003   -0.8003   -0.8003   -0.4821   0.8003
     </tableData>
  </table>

<!-- thrust effects of helical tip Mach -->
<table name="CT_MACH" type="internal">
  <tableData>
    0.85   1.0
    1.05   0.8
  </tableData>
</table>

<!-- power-required effects of helical tip Mach -->
<table name="CP_MACH" type="internal">
  <tableData>
    0.85   1.0
    1.05   1.8
    2.00   1.4
  </tableData>
</table>

</propeller>
